// SBML level 3 version 1

model default_id()
  // default_name

  // Compartments:
  compartment extracellular = 1;
  compartment cytosol = 1;

  // Species:
  species GlcX in extracellular = 6.7; GlcX is "Extracellular glucose";
  species Glc in cytosol = 0.6; Glc is "Cytosolic glucose";
  species ATP in cytosol = 2.1;
  species G6P in cytosol = 4.2; G6P is "Glucose-6-Phosphate";
  species ADP in cytosol = 1.5;
  species F6P in cytosol = 0.5; F6P is "Fructose-6-Phosphate";
  species FBP in cytosol = 4.6; FBP is "Fructose 1,6-bisphosphate";
  species GAP in cytosol = 0.1; GAP is "Glyceraldehyde 3-phosphate";
  species DHAP in cytosol = 3; DHAP is "Dihydroxyacetone phosphate";
  species NAD in cytosol = 0.7;
  species BPG in cytosol = 0; BPG is "1,3-Bisphosphoglycerate";
  species NADH in cytosol = 0.3;
  species PEP in cytosol = 0; PEP is "Phosphoenolpyruvate";
  species Pyr in cytosol = 8.7; Pyr is "Pyruvate";
  species ACA in cytosol = 1.5; ACA is "Acetaldehyde";
  species EtOH in cytosol = 19.2;
  species EtOHX in extracellular = 16.5; EtOHX is "Extracellular ethanol";
  species Glyc in cytosol = 4.2; Glyc is "Glycerol";
  species GlycX in extracellular = 1.7; GlycX is "Extracellular glycerol";
  species ACAX in extracellular = 1.3; ACAX is "Extracellular acetaldehyde";
  species CNX in extracellular = 5.2; CNX is "Extracellular cyanide";
  species AMP in cytosol = 0.3;
  species P in extracellular = 0;
  species CNX0 in extracellular = 5.6; CNX0 is "Mixed flow cyanide";
  species GlcX0 in extracellular = 24; GlcX0 is "Mixed flow glucose";

  // Parameters:
  k23 = 1;
  P2 = 1;
  V4f = 1;
  V11m = 1;
  k24f = 1;
  V15m = 1;
  V7f = 1;
  K8NADH = 1;
  K2IIG6P = 1;
  K3ATP = 1;
  K6eq = 1;
  k16 = 1;
  K12NADH = 1;
  K3Glc = 1;
  k20 = 1;
  K4eq = 1;
  K7DHAP = 1;
  V7r = 1;
  k24r = 1;
  k9r = 1;
  k9f = 1;
  K2IG6P = 1;
  K10ADP = 1;
  K6DHAP = 1;
  K8eq = 1;
  K15NADH = 1;
  kappa5 = 1;
  K6GAP = 1;
  V5m = 1;
  V8r = 1;
  K15INADH = 1;
  V2f = 1;
  K5 = 1;
  V6f = 1;
  K7eq = 1;
  K6FBP = 1;
  K2Glc = 1;
  K7GAP = 1;
  K4F6P = 1;
  V12m = 1;
  V4r = 1;
  k22 = 1;
  K15DHAP = 1;
  V3m = 1;
  K8GAP = 1;
  K11 = 1;
  K8BPG = 1;
  V10m = 1;
  ratio6 = 1;
  Yvol = 1;
  k0 = 1;
  K10PEP = 1;
  K4G6P = 1;
  V2r = 1;
  K12ACA = 1;
  K3DGlc = 1;
  K8NAD = 1;
  k13 = 1;
  k18 = 1;
  K6IGAP = 1;
  K15INAD = 1;
  pow = 1;
  V8f = 1;

  // Reactions:
  vinGlc: GlcX0 -> GlcX; extracellular*k0*(GlcX0 - GlcX); vinGlc is "Glucose Mixed flow to extracellular medium";
  vGlcTrans: GlcX -> 59 Glc; extracellular*V2f/Yvol*(GlcX/K2Glc/(1 + GlcX/K2Glc + (P2*(GlcX/K2Glc) + 1)/(P2*(Glc/K2Glc) + 1)*(1 + Glc/K2Glc + G6P/K2IG6P + Glc*G6P/(K2Glc*K2IIG6P)))) - cytosol*V2r/Yvol*(Glc/K2Glc/(1 + Glc/K2Glc + (P2*(Glc/K2Glc) + 1)/(P2*(GlcX/K2Glc) + 1)*(1 + GlcX/K2Glc) + G6P/K2IG6P + Glc*G6P/(K2Glc*K2IIG6P))); vGlcTrans is "Glucose uptake";  // modifiers: G6P
  vHK: ATP + Glc -> G6P + ADP; cytosol*V3m*ATP*Glc/(K3DGlc*K3ATP + K3Glc*ATP + K3ATP*Glc + Glc*ATP); vHK is "Hexokinase";
  vPGI: G6P -> F6P; cytosol*(V4f*G6P/(K4G6P + G6P + K4G6P/K4F6P*F6P) - V4r*(F6P/K4eq)/(K4G6P + G6P + K4G6P/K4F6P*F6P)); vPGI is "Phosphoglucoisomerase";
  vPFK: F6P + ATP -> FBP + ADP; cytosol*(V5m*F6P^2/(K5*(1 + kappa5*(ATP/AMP)*(ATP/AMP)) + F6P^2)); vPFK is "Phosphofructokinase";  // modifiers: AMP
  vALD: FBP -> GAP + DHAP; cytosol*(V6f*FBP/(K6FBP + FBP + GAP*K6DHAP*V6f/(K6eq*V6f*ratio6) + DHAP*K6GAP*V6f/(K6eq*V6f*ratio6) + FBP*GAP/K6IGAP + GAP*DHAP*V6f/(K6eq*V6f*ratio6)) - V6f*GAP*DHAP/K6eq/(K6FBP + FBP + GAP*K6DHAP*V6f/(K6eq*V6f*ratio6) + DHAP*K6GAP*V6f/(K6eq*V6f*ratio6) + FBP*GAP/K6IGAP + GAP*DHAP*V6f/(K6eq*V6f*ratio6))); vALD is "Aldolase";
  vTIM: DHAP -> GAP; cytosol*(V7f*DHAP/(K7DHAP + DHAP + K7DHAP/K7GAP*GAP) - V7r*(GAP/K7eq)/(K7DHAP + DHAP + K7DHAP/K7GAP*GAP)); vTIM is "Triosephosphate isomerase";
  vGAPDH: GAP + NAD -> NADH + BPG; cytosol*(V8f*GAP*NAD/K8GAP/K8NAD/((1 + GAP/K8GAP + BPG/K8BPG)*(1 + NAD/K8NAD + NADH/K8NADH)) - V8r*BPG*NADH/K8eq/K8GAP/K8NAD/((1 + GAP/K8GAP + BPG/K8BPG)*(1 + NAD/K8NAD + NADH/K8NADH))); vGAPDH is "Glyceraldehyde 3-phosphate dehydrogenase";
  vlpPEP: BPG + ADP -> PEP + ATP; cytosol*(k9f*BPG*ADP - k9r*PEP*ATP); vlpPEP is "Phosphoenolpyruvate synthesis";
  vPK: ADP + PEP -> Pyr + ATP; cytosol*(V10m*ADP*PEP/((K10PEP + PEP)*(K10ADP + ADP))); vPK is "Pyruvate kinase";
  vPDC: Pyr -> ACA; cytosol*(V11m*Pyr/(K11 + Pyr)); vPDC is "Pyruvate decarboxylase";
  vADH: NADH + ACA -> NAD + EtOH; cytosol*(V12m*ACA*NADH/((K12NADH + NADH)*(K12ACA + ACA))); vADH is "Alcohol dehydrogenase";
  vdifEtOH: 59 EtOH -> EtOHX; k13/Yvol*(cytosol*EtOH - extracellular*EtOHX); vdifEtOH is "Ethanol out";
  voutEtOH: EtOHX -> P; extracellular*k0*EtOHX; voutEtOH is "Ethanol flow";
  vlpGlyc: DHAP + NADH -> Glyc + NAD; cytosol*(V15m*DHAP/(K15DHAP*(1 + K15INADH/NADH*(1 + NAD/K15INAD)) + DHAP*(1 + K15NADH/NADH*(1 + NAD/K15INAD)))); vlpGlyc is "Glycerol synthesis";
  vdifGlyc: 59 Glyc -> GlycX; k16/Yvol*(cytosol*Glyc - extracellular*GlycX); vdifGlyc is "Glycerol out";
  voutGlyc: GlycX -> P; extracellular*k0*GlycX; voutGlyc is "Glycerol flow";
  vdifACA: 59 ACA -> ACAX; k18/Yvol*(cytosol*ACA - extracellular*ACAX); vdifACA is "Acetaldehyde out";
  voutACA: ACAX -> P; extracellular*k0*ACAX; voutACA is "Acetaldehyde flow";
  vlacto: CNX + ACAX -> P; extracellular*k20*ACAX*CNX; vlacto is "Cyanide-Acetaldehyde flow";
  vinCN: CNX0 -> CNX; extracellular*k0*(CNX0 - CNX); vinCN is "Cyanide flow";
  vstorage: ATP + G6P -> ADP; cytosol*k22*ATP*G6P; vstorage is "Storage";
  vconsum: ATP -> ADP; cytosol*k23*ATP; vconsum is "ATP consumption";
  vAK: ATP + AMP -> 2 ADP; cytosol*(k24f*AMP*ATP - k24r*ADP^2); vAK is "Adenylate kinase";
end
