// SBML level 2 version 4

model default_id()
  // default_name

  // Compartments:
  compartment Default_Compartment = 1;

  // Species:
  species PEP in Default_Compartment = 1;
  species PYR in Default_Compartment = 1;
  species P in Default_Compartment = 1;
  species TRIO in Default_Compartment = 1;
  species NADH in Default_Compartment = 1;
  species NAD in Default_Compartment = 1;
  species GLY in Default_Compartment = 1;
  species BPG in Default_Compartment = 1;
  species GLCi in Default_Compartment = 1;
  species G6P in Default_Compartment = 1;
  species P2G in Default_Compartment = 1;
  species F16P in Default_Compartment = 1;
  species Trh in Default_Compartment = 1;
  species ACE in Default_Compartment = 1;
  species ETOH in Default_Compartment = 1;
  species P3G in Default_Compartment = 1;
  species Glyc in Default_Compartment = 1;
  species F6P in Default_Compartment = 1;
  species CO2 in Default_Compartment = 1;
  species SUCC in Default_Compartment = 1;
  species GLCo in Default_Compartment = 1;

  // Parameters:
  KiADHETOH = 1;
  KmGAPDHNAD = 1;
  KmALDGAPi = 1;
  KmPGKADP = 1;
  VmPGI_2 = 1;
  KmPYKADP = 1;
  KmPGIG6P_2 = 1;
  KmPYKPEP = 1;
  KmALDGAP = 1;
  cytosol = 1;
  KmG3PDHDHAP = 1;
  KeqGLK = 1;
  VmG3PDH = 1;
  KmG3PDHNADH = 1;
  KmGLKADP = 1;
  KmGAPDHNADH = 1;
  ADP = 1;
  KmADHNADH = 1;
  KmPFKATP = 1;
  KmALDF16P = 1;
  VmPGK = 1;
  KmG3PDHNAD = 1;
  KmGAPDHGAP = 1;
  KmPYKATP = 1;
  KiADHACE = 1;
  KeqPGK = 1;
  KSUCC = 1;
  KmGLTGLCi = 1;
  KmPGKBPG = 1;
  KeqPYK = 1;
  KTREHALOSE = 1;
  KATPASE = 1;
  KmGLKG6P = 1;
  KmPYKPYR = 1;
  KiADHNADH = 1;
  KmPFKF6P = 1;
  gR = 1;
  KeqALD = 1;
  R_PFK = 1;
  KeqENO = 1;
  KmPGMP2G = 1;
  KmGAPDHBPG = 1;
  VmPDC = 1;
  VmPGM = 1;
  VmPFK = 1;
  VmGAPDHr = 1;
  KmPGIF6P_2 = 1;
  KmENOPEP = 1;
  KmPGKATP = 1;
  KmPGMP3G = 1;
  VmGAPDHf = 1;
  KmADHETOH = 1;
  KiADHNAD = 1;
  ATP = 1;
  KmPGKP3G = 1;
  KmGLKATP = 1;
  VmGLK = 1;
  KmENOP2G = 1;
  VmGLT = 1;
  VmENO = 1;
  KGLYCOGEN_3 = 1;
  VmADH = 1;
  KeqPGI_2 = 1;
  VmALD = 1;
  KmADHNAD = 1;
  KmADHACE = 1;
  KmGLKGLCi = 1;
  KmG3PDHGLY = 1;
  VmPYK = 1;
  KeqADH = 1;
  KeqPGM = 1;
  KeqG3PDH = 1;
  KmGLTGLCo = 1;
  L_PFK = 1;
  KeqTPI = 1;
  KeqGLT = 1;
  pow = 1;
  KmALDDHAP = 1;

  // Reactions:
  vGLK: GLCi + P -> G6P; cytosol*VmGLK/(KmGLKGLCi*KmGLKATP)*(GLCi*ATP - G6P*ADP/KeqGLK)/((1 + GLCi/KmGLKGLCi + G6P/KmGLKG6P)*(1 + ATP/KmGLKATP + ADP/KmGLKADP)); vGLK is "Hexokinase";
  vPGI: G6P -> F6P; cytosol*VmPGI_2/KmPGIG6P_2*(G6P - F6P/KeqPGI_2)/(1 + G6P/KmPGIG6P_2 + F6P/KmPGIF6P_2); vPGI is "Glucose-6-phosphate isomerase";
  vGLYCO: G6P + P => Glyc; cytosol*KGLYCOGEN_3; vGLYCO is "Glycogen synthesis";
  vTreha: 2 G6P + P => Trh; cytosol*KTREHALOSE; vTreha is "Trehalose 6-phosphate synthase";
  vPFK: F6P + P => F16P; cytosol*VmPFK*gR*(F6P/KmPFKF6P)*(ATP/KmPFKATP)*R_PFK(KmPFKF6P, KmPFKATP, gR, ATP, F6P)/(R_PFK(KmPFKF6P, KmPFKATP, gR, ATP, F6P)^2 + L_PFK(Lzero, CiPFKATP, KiPFKATP, CPFKAMP, KPFKAMP, CPFKF26BP, KPFKF26BP, CPFKF16BP, KPFKF16BP, ATP, AMP, F16P, F26BP)*T_PFK(CPFKATP, KmPFKATP, ATP)^2); vPFK is "Phosphofructokinase";
  vALD: F16P -> 2 TRIO; cytosol*VmALD/KmALDF16P*(F16P - KeqTPI/(1 + KeqTPI)*TRIO*(1/(1 + KeqTPI))*TRIO/KeqALD)/(1 + F16P/KmALDF16P + KeqTPI/(1 + KeqTPI)*TRIO/KmALDGAP + 1/(1 + KeqTPI)*TRIO/KmALDDHAP + KeqTPI/(1 + KeqTPI)*TRIO*(1/(1 + KeqTPI))*TRIO/(KmALDGAP*KmALDDHAP) + F16P*(KeqTPI/(1 + KeqTPI))*TRIO/(KmALDGAPi*KmALDF16P)); vALD is "Aldolase";
  vGAPDH: TRIO + NAD -> BPG + NADH; cytosol*(VmGAPDHf*(KeqTPI/(1 + KeqTPI))*TRIO*NAD/(KmGAPDHGAP*KmGAPDHNAD) - VmGAPDHr*BPG*NADH/(KmGAPDHBPG*KmGAPDHNADH))/((1 + KeqTPI/(1 + KeqTPI)*TRIO/KmGAPDHGAP + BPG/KmGAPDHBPG)*(1 + NAD/KmGAPDHNAD + NADH/KmGAPDHNADH)); vGAPDH is "Glyceraldehyde 3-phosphate dehydrogenase";
  vPGK: BPG -> P3G + P; cytosol*VmPGK/(KmPGKP3G*KmPGKATP)*(KeqPGK*BPG*ADP - P3G*ATP)/((1 + BPG/KmPGKBPG + P3G/KmPGKP3G)*(1 + ATP/KmPGKATP + ADP/KmPGKADP)); vPGK is "Phosphoglycerate kinase";
  vPGM: P3G -> P2G; cytosol*VmPGM/KmPGMP3G*(P3G - P2G/KeqPGM)/(1 + P3G/KmPGMP3G + P2G/KmPGMP2G); vPGM is "Phosphoglycerate mutase";
  vENO: P2G -> PEP; cytosol*VmENO/KmENOP2G*(P2G - PEP/KeqENO)/(1 + P2G/KmENOP2G + PEP/KmENOPEP); vENO is "Enolase";
  vPYK: PEP -> PYR + P; cytosol*VmPYK/(KmPYKPEP*KmPYKADP)*(PEP*ADP - PYR*ATP/KeqPYK)/((1 + PEP/KmPYKPEP + PYR/KmPYKPYR)*(1 + ATP/KmPYKATP + ADP/KmPYKADP)); vPYK is "Pyruvate kinase";
  vPDC: PYR => ACE + CO2; cytosol*VmPDC*(PYR^nPDC/KmPDCPYR^nPDC)/(1 + PYR^nPDC/KmPDCPYR^nPDC); vPDC is "Pyruvate decarboxylase";
  vSUC: 2 ACE + 3 NAD + 4 P => 3 NADH + SUCC; cytosol*KSUCC*ACE; vSUC is "Succinate synthesis";
  vGLT: GLCo -> GLCi; VmGLT/KmGLTGLCo*(GLCo - GLCi/KeqGLT)/(1 + GLCo/KmGLTGLCo + GLCi/KmGLTGLCi + 0.91*GLCo*GLCi/(KmGLTGLCo*KmGLTGLCi)); vGLT is "Glucose transport";
  vADH: ACE + NADH -> NAD + ETOH; -cytosol*(VmADH/(KiADHNAD*KmADHETOH)*(NAD*ETOH - NADH*ACE/KeqADH)/(1 + NAD/KiADHNAD + KmADHNAD*ETOH/(KiADHNAD*KmADHETOH) + KmADHNADH*ACE/(KiADHNADH*KmADHACE) + NADH/KiADHNADH + NAD*ETOH/(KiADHNAD*KmADHETOH) + KmADHNADH*NAD*ACE/(KiADHNAD*KiADHNADH*KmADHACE) + KmADHNAD*ETOH*NADH/(KiADHNAD*KmADHETOH*KiADHNADH) + NADH*ACE/(KiADHNADH*KmADHACE) + NAD*ETOH*ACE/(KiADHNAD*KmADHETOH*KiADHACE) + ETOH*NADH*ACE/(KiADHETOH*KiADHNADH*KmADHACE))); vADH is "Alcohol dehydrogenase";
  vG3PDH: TRIO + NADH => NAD + GLY; cytosol*VmG3PDH/(KmG3PDHDHAP*KmG3PDHNADH)*(1/(1 + KeqTPI)*TRIO*NADH - GLY*NAD/KeqG3PDH)/((1 + 1/(1 + KeqTPI)*TRIO/KmG3PDHDHAP + GLY/KmG3PDHGLY)*(1 + NADH/KmG3PDHNADH + NAD/KmG3PDHNAD)); vG3PDH is "Glycerol 3-phosphate dehydrogenase";
  vATP: P -> ; cytosol*KATPASE*ATP; vATP is "ATPase activity";
end
